Clear

New Circuit.maez_feeder Phases=3 BaseKV=12.47 PU=1.000 Bus1=src_1 MVAsc3=20000 MVASC1=21000

Redirect LineCodes.dss
Redirect Lines.dss
Redirect Loads.dss
Redirect PVSystems.dss

Set VoltageBases=[12.47]
CalcVoltageBases

Set ControlMode=Static
Set MaxControlIter=20

! Set LoadModel=PowerFlow
! Set Algorithm=Newton

Solve
